! CFRPを１本のみ埋め込んだ試験片


!/input,c:\ansys\test-line,txt
finish
/clear,start
/NOPR

!-タイトル--------------------------------------------------
/TITLE,TEST

!-総合プリプロセッサ----------------------------------------
/PREP7


!-基本定義--------------------------------------------------
ANTYPE,STATIC        ! 静解析
ET,1,SOLID185       ! 試験片ALとCFRPにSOLID185を使用

/NOPR                !構造解析
KEYW,PR_SET,1
KEYW,PR_STRUC,1
KEYW,PR_THERM,0
KEYW,PR_FLUID,0
KEYW,PR_ELMAG,0
KEYW,MAGNOD,0
KEYW,MAGEDG,0
KEYW,MAGHFE,0
KEYW,MAGELC,0
KEYW,PR_MULTI,0
KEYW,PR_CFD,0
/GO

!-パラメータ定義--------------------------------------------
X1  = 120E-3
! Y1	=	25E-3
Z1	=	5E-3
Y2	=	8E-3
Y3      =       10E-3
Z2      =       3E-3
Y4 = 1E-3 ! CFRPの厚さ
Z3 = Y4

DIV1=2.0E-3  !分割数1 エポキシ樹脂・PLA
DIV2=0.5E-3 !分割数2 CFRP
DIV3=0.4E-3
DIV4=0.2E-3
DIV5=0.2E-3

DISTANCE=-3E-3
TIME1 = 3


!-材料物性定義----------------------------------------------


!>>>>>材料3>>>>>>>
! CFRP
Cee1 = 54E9!1方向弾性率
Cee2 = 6E9  !2方向弾性率
Cee3 = 6E9  !3方向弾性率

Cnu12 = 0.30 !zx,zy方向ポアソン比
Cnu13 = 0.30 !xz,yz方向ポアソン比
Cnu23 = 0.35 !xy,yx方向ポアソン比

Cg23 = 9E9 !2-3方向せん断弾性率
Cg12 = 4E9 !2-3方向せん断弾性率

CsuA = -100E9 !圧縮強度
CsuX = 701E6 !引張強度(繊維平行方向)
CsuZ = 19E6 !引張強度(繊維垂直方向)
CsuY = 19E6 !引張強度(繊維垂直レイアップ方向)
SendanXYZ = 90.4E6 !せん断許容応力

! MITUDO1=  1260  !質量密度


MP,EX,3,Cee1        ! 材料1:CFRTP
MP,EY,3,Cee3
MP,EZ,3,Cee2

MP,PRXY,3,Cnu12
MP,PRYZ,3,Cnu23
MP,PRXZ,3,Cnu13

! MP,NUXY,3,Cnu12
! MP,NUYZ,3,Cnu21
! MP,NUXZ,3,Cnu12


MP,GXY,3,Cg23
MP,GYZ,3,Cg12
MP,GXZ,3,Cg23

!MP,DENS,1,MITUDO1


!-損傷モデル定義------------------------------------------


!>>>>>材料3>>>>>>>
! CFRP
TB,DMGI,3,,4,1			! 損傷発生の基準則を指定
TBDATA,1,2,2,2,2			! 最大応力則の指定

TB,FCLI,3,1,20,1			! 損傷発生の閾値を指定
TBDATA,1,CsuX,CsuA,CsuY,CsuA,CsuZ,CsuA! 応力指定
TBDATA,7,SendanXYZ,SendanXYZ,SendanXYZ

TB,DMGE,3,1,4,1			! 損傷発生時の剛性減少率を指定
TBDATA,1,1,1,1,1	! 損傷発生時の剛性減少率を指定


!-キーポイント定義------------------------------------------

! CFRP
K       ,      17       ,       0       ,    (Y3-Y4)/2  ,       (Z1-Z3)/2
K       ,      18       ,       0       ,  (Y3-Y4)/2+Y4 ,       (Z1-Z3)/2
K       ,      19       ,       X1      ,  (Y3-Y4)/2+Y4 ,       (Z1-Z3)/2
K       ,      20       ,       X1      ,  (Y3-Y4)/2    ,       (Z1-Z3)/2
K       ,      21       ,       0       ,    (Y3-Y4)/2  ,       (Z1-Z3)/2+Z3
K       ,      22       ,       0       , (Y3-Y4)/2+Y4  ,       (Z1-Z3)/2+Z3
K       ,      23       ,       X1      ,  (Y3-Y4)/2+Y4 ,       (Z1-Z3)/2+Z3
K       ,      24       ,       X1      ,  (Y3-Y4)/2    ,       (Z1-Z3)/2+Z3


!-ヴォリューム構築------------------------------------------------------

!---試験片--------------------------------------------

! CFRP部分
V	,	17	,	18	,	19	,	20	,	21	,	22	,	23	,	24
ALLSEL
CM,CFRP,VOLU


! ALLSEL
! CM,SPECIMEN,VOLU
! VOVLAP,SPECIMEN !重なった部分のヴォリューム作成

! CMSEL,U,CFRP
! VSEL,R,LOC,Z,(Z1-Z2)/2,(Z1-Z2)/2+Z2
! VSEL,R,LOC,Y,(Y3-Y2)/2,(Y3-Y2)/2+Y2

! VSEL,S,LOC,X,0,Y4
! VSEL,S,LOC,Y,0,Y3-Y2
! VSEL,S,VOLU,,9,16

! VSEL,S,LOC,X,0,X1

! ALLSEL
! VGLUE,ALL

! !-CF部のローカル座標定義--------------------------------------------------

! LOCAL,11,0,0,0,0,0,0,90
! CSYS,0

! !-CF部の繊維方向定義--------------------------------------------------
! !>>>>1層目>>>>>>>>>>>>
! CMSEL,S,CFRP
! VATT,3,,1,11

!-メッシュ分割--------------------------------------------------

! ALLSEL
! ! CMSEL,U,CFRP
! AESIZE,ALL,DIV1

CMSEL,S,CFRP
AESIZE,ALL,DIV2

ALLSEL

!-試験片CFRPメッシュ--------------------------------------------
CMSEL,S,CFRP
TYPE,1                             !要素1
MAT,3                             !材料2
MSHAPE,0,3D
MSHKEY,1
VMESH,ALL
MOPT,DEFA
! VSWEEP,ALL
! MOPT,DEFA
CM,CFRP,VOLU


!-境界条件指定--------------------------------------------------
ALLSEL

ASEL,S,LOC,X,X1 !グリップ固定
NSLA,S,1
D,ALL,UZ,0
D,ALL,UX,0
D,ALL,UY,0

! ASEL,S,LOC,Y,0 !グリップ固定
! NSLA,S,1
! D,ALL,UY,0

ASEL,S,LOC,X,0 !荷重負荷面カップリング
NSLA,S,1
CP,NEXT,UX,ALL

*GET,NNUM,NODE,,NUM,MIN !最小の節点選択
D,NNUM,UX,DISTANCE !節点引張距離


ALLSEL !節点全選択

!-解析------------------------------------------------------
FINISH
/POST1


FINISH
/SOLU


NSUBST,100,1000,100 ! データベースとファイルの書き込み制御の結果アイテム
TIME,TIME1

OUTRES,ERASE

!OUTRES,ALL,ALL
OUTRES,NSOL,1    !節点の自由度の解
OUTRES,ESOL,1    !次の要素ソリューションアイテムをすべて有効または無効にする
OUTRES,RSOL,1    !節点反応荷重
OUTRES,NLOAD,1    !要素の節点、入力拘束、および力の荷重（POST1コマンドのPRRFOR、NFORCE、FSUMでも使用され、反力の荷重を計算します）。
OUTRES,MISC,1    !エレメントのその他のデータ（ETABLEコマンドのSMISCおよびNMISCアイテム）


SAVE
SOLVE


FINISH


/POST26

RFORCE, 2, NNUM, F, X, FX
PRVAR,2, !変数2をリストに表示


!-XYせん断応力コンター表示-----------------------------------------------------
/POST1
SET,LAST


WPLANE, 1, 0, 0, Z1/2, 0, Y3, Z1/2, X1, 0, Z1/2
/CPLANE, 1
/TYPE,1,8
