finish
/clear,start
/NOPR

!-タイトル--------------------------------------------------
/TITLE,TEST

!-総合プリプロセッサ----------------------------------------
/PREP7


!-基本定義--------------------------------------------------
ANTYPE,STATIC        ! 静解析
ET,1,SOLID186       ! 試験片ALとCFRPにSOLID185を使用

/NOPR                !構造解析
KEYW,PR_SET,1
KEYW,PR_STRUC,1
KEYW,PR_THERM,0
KEYW,PR_FLUID,0
KEYW,PR_ELMAG,0
KEYW,MAGNOD,0
KEYW,MAGEDG,0
KEYW,MAGHFE,0
KEYW,MAGELC,0
KEYW,PR_MULTI,0
KEYW,PR_CFD,0
/GO

!-パラメータ定義--------------------------------------------
X1 = 80E-3 !試験片長さ
Z1 = 5E-3 !PLA厚さ
E_y = 12E-3 !エポキシ部の長さ
P_y = 14E-3 !PLA横の長さ
E_z = 3E-3 !エポキシ部の厚さ

CF_lap = 25E-3 ! CFRPの重ね継ぎ手長さ
CF_len = (X1 + CF_lap) / 2 !CFRP長さ
CF_radius = 0.564E-3 !CFRPの半径
CF_gap = 1.0E-3 ! CFRP間の距離
Y4 = P_y/2 - CF_gap/2 - CF_radius !CFRP1の中心y座標
Y5 = P_y/2 + CF_gap/2 + CF_radius !CFRP2の初期位置

R_cf_top_h = 0.2 ! cfrp先端の比率
R_cf_small = 0.5 ! cfrpが細い部分のラップ長さの比率

X_cf_small_fir = CF_len - (R_cf_small / (1 / CF_lap))


! 傘部分の変数設定
CF_kasa_radius = 0.2E-3 ! 傘の斜め部分の半径
sita1 = 15 / 57.3 ! 入力値．上の傘部分の角度．8°以上が推奨．おそらく5度以下だとはみ出たりする．
R_small_div_1 = 0.01 ! 分割を細かくするCFRP部分の割合．エラー回避用．
R_small_div_2 = 0.3 ! 分割を細かくするCFRP部分の割合．エラー回避用．
alpha1 = CF_kasa_radius + 1E-3 ! 傘の部分とPLAの間の距離
beta1 = CF_kasa_radius + 2E-3 ! 傘の部分とPLAの間の距離

kasa_CF_len =((E_y+P_y)/2-Y4-alpha1) / SIN(sita1) ! 斜め繊維の長さ
X_kasa_fir = X1-(CF_len+beta1)-(Y5-Y4)/TAN(sita1) ! 傘の斜め繊維が出てくる最初のx座標
sita2 = ASIN((Y4-(P_y-E_y)/2-alpha1)/kasa_CF_len) ! 下の傘部分の角度

X_small_div_1 = X_kasa_fir-X_cf_small_fir/2/(1/R_small_div_1)
X_small_div_2 = X_kasa_fir+X_cf_small_fir/2/(1/R_small_div_2)


DIV1=2.0E-3  !分割数1
DIV2=0.8E-3 !分割数2
DIV3=0.3E-3 !分割数3

DISTANCE = 2E-3
TIME1 = 2


!-材料物性定義----------------------------------------------
!>>>>>材料1>>>>>>>
! PLA
Aee1 = 2.78E9!全方向弾性率

Anu12 = 0.3 !全方向ポアソン比

Ag12 = 0.1E9   !全方向せん断弾性率

AsuA = -20E6 !圧縮強度
AsuXYZ = 55E6 !引張強度
SendanXYZ_1 = 20E6 !せん断許容応力
!MITUDO2= 2790   !質量密度


MP,EX,1,Aee1        ! 材料2:AL
MP,EY,1,Aee1
MP,EZ,1,Aee1
MP,PRXY,1,Anu12
MP,PRYZ,1,Anu12
MP,PRXZ,1,Anu12
MP,GXY,1,Ag12
MP,GYZ,1,Ag12
MP,GXZ,1,Ag12


!>>>>>材料2>>>>>>>
! エポキシ樹脂
! Bee1 = 2E9!全方向弾性率
Bee1 = 1E9!全方向弾性率

Bnu12 = 0.39 !全方向ポアソン比

Bg12 = 0.05E9   !全方向せん断弾性率

BsuA = -100E6 !圧縮強度
BsuXYZ = 70E6 !引張強度
SendanXYZ_2= 20E6 !せん断許容応力

!MITUDO2= 2790   !質量密度


MP,EX,2,Bee1        ! 材料2:AL
MP,EY,2,Bee1
MP,EZ,2,Bee1
MP,PRXY,2,Bnu12
MP,PRYZ,2,Bnu12
MP,PRXZ,2,Bnu12
MP,GXY,2,Bg12
MP,GYZ,2,Bg12
MP,GXZ,2,Bg12

!MP,DENS,2,MITUDO2

!>>>>>材料3>>>>>>>
! CFRP
Cee1 = 62.5E9!1方向弾性率
Cee2 = 6E9  !2方向弾性率
Cee3 = 6E9  !3方向弾性率

Cnu12 = 0.30 !zx,zy方向ポアソン比
Cnu13 = 0.30 !xz,yz方向ポアソン比
Cnu23 = 0.35 !xy,yx方向ポアソン比

Cg23 = 0.9E9 !2-3方向せん断弾性率
Cg12 = 4E9 !2-3方向せん断弾性率

CsuA = -100E9 !圧縮強度
CsuX = 965E6 !引張強度(繊維平行方向)
CsuZ = 19E6 !引張強度(繊維垂直方向)
CsuY = CsuZ !引張強度(繊維垂直レイアップ方向)
SendanXYZ = 90.4E6 !せん断許容応力

! MITUDO1=  1260  !質量密度


MP,EX,3,Cee1        ! 材料1:CFRTP
MP,EY,3,Cee3
MP,EZ,3,Cee2

MP,PRXY,3,Cnu12
MP,PRYZ,3,Cnu23
MP,PRXZ,3,Cnu13

! MP,NUXY,3,Cnu12
! MP,NUYZ,3,Cnu21
! MP,NUXZ,3,Cnu12


MP,GXY,3,Cg23
MP,GYZ,3,Cg12
MP,GXZ,3,Cg23

!MP,DENS,1,MITUDO1


!-損傷モデル定義------------------------------------------

!>>>>>材料1>>>>>>>
! PLA
TB,DMGI,1,,4,1			! 損傷発生の基準則を指定
TBDATA,1,2,2,2,2			! 最大応力則の指定

TB,FCLI,1,1,20,1			! 損傷発生の閾値を指定
TBDATA,1,AsuXYZ,AsuA,AsuXYZ,AsuA,AsuXYZ,AsuA! 応力指定
TBDATA,7,SendanXYZ_1,SendanXYZ_1,SendanXYZ_1

TB,DMGE,1,1,4,1			! 損傷発生時の剛性減少率を指定
TBDATA,1,1,1,1,1	! 損傷発生時の剛性減少率を指定

! TB,BKIN,1,1,2,1
! TBTEMP,0
! TBDATA,,35.1e6,2e9,,,,

!>>>>>材料2>>>>>>>
! epoxy
TB,DMGI,2,,4,1			! 損傷発生の基準則を指定
TBDATA,1,2,2,2,2			! 最大応力則の指定

TB,FCLI,2,1,20,1			! 損傷発生の閾値を指定
TBDATA,1,BsuXYZ,BsuA,BsuXYZ,BsuA,BsuXYZ,BsuA! 応力指定
TBDATA,7,SendanXYZ_2,SendanXYZ_2,SendanXYZ_2

TB,DMGE,2,1,4,1			! 損傷発生時の剛性減少率を指定
TBDATA,1,1,1,1,1	! 損傷発生時の剛性減少率を指定

! TB,BKIN,2,1,2,1
! TBTEMP,0
! TBDATA,,11.2e6,1.8e9,,,,

!>>>>>材料3>>>>>>>
! CFRP
TB,DMGI,3,,4,1			! 損傷発生の基準則を指定
TBDATA,1,2,2,2,2			! 最大応力則の指定

TB,FCLI,3,1,20,1			! 損傷発生の閾値を指定
TBDATA,1,CsuX,CsuA,CsuY,CsuA,CsuZ,CsuA! 応力指定
TBDATA,7,SendanXYZ,SendanXYZ,SendanXYZ

TB,DMGE,3,1,4,1			! 損傷発生時の剛性減少率を指定
TBDATA,1,1,1,1,1	! 損傷発生時の剛性減少率を指定


!-キーポイント定義------------------------------------------
! PLA
K	,	1	,	0	,	0	,	0
K	,	2	,	0	,	P_y	,	0
K	,	3	,	X1	,	P_y	,	0
K	,	4	,	X1	,	0	,	0
K	,	5	,	0	,	0	,	Z1
K	,	6	,	0	,	P_y	,	Z1
K	,	7	,	X1	,	P_y	,	Z1
K	,	8	,	X1	,	0	,	Z1
! Epoxy
K       ,       9       ,       0       ,    (P_y-E_y)/2  ,       (Z1-E_z)/2
K       ,      10       ,       0       ,  (P_y-E_y)/2+E_y ,       (Z1-E_z)/2
K       ,      11       ,       X1      ,  (P_y-E_y)/2+E_y ,       (Z1-E_z)/2
K       ,      12       ,       X1      ,  (P_y-E_y)/2    ,       (Z1-E_z)/2
K       ,      13       ,       0       ,    (P_y-E_y)/2  ,       (Z1-E_z)/2+E_z
K       ,      14       ,       0       , (P_y-E_y)/2+E_y  ,       (Z1-E_z)/2+E_z
K       ,      15       ,       X1      ,  (P_y-E_y)/2+E_y ,       (Z1-E_z)/2+E_z
K       ,      16       ,       X1      ,  (P_y-E_y)/2    ,       (Z1-E_z)/2+E_z


!-ヴォリューム構築------------------------------------------------------

!---試験片--------------------------------------------
! PLA部分
V	,	1	,	2	,	3	,	4	,	5	,	6	,	7	,	8
ALLSEL
CM,SOTO,VOLU

! エポキシ樹脂部分
V	,	9	,	10	,	11	,	12	,	13	,	14	,	15	,	16
ALLSEL
CMSEL,U,SOTO
CM,UCHI,VOLU
ALLSEL
VOVLAP,ALL !重なり部分を削除
ALLSEL
CMSEL,U,UCHI
CM,SOTO,VOLU


! CFRP1部分前半
WPOFFS, 0, Y4, Z1/2
WPROTA, 0, 0, 90
CYLIND, CF_radius,0,0,X_small_div_1
! CFRP1の細かい分割部分
CYLIND, CF_radius,0,X_small_div_1,X_small_div_2
! CFRP1部分後半
CYLIND, CF_radius,0,X_small_div_2,X_cf_small_fir
WPCSYS, -1
! CFRPの先端
WPOFFS, X_cf_small_fir,Y4, Z1/2
WPROTA, 0, 0, 90
CONE,CF_radius,CF_radius*R_cf_top_h,CF_len-X_cf_small_fir
WPCSYS, -1

! CFRP2部分
WPOFFS, 0, Y4+CF_gap+CF_radius*2, Z1/2
WPROTA, 0, 0, 90
CYLIND, CF_radius,0,X1-X_cf_small_fir,X1
WPCSYS, -1
! CFRPの先端
WPOFFS, X1-X_cf_small_fir,Y4+CF_gap+CF_radius*2, Z1/2
WPROTA, 0, 0, -90
CONE,CF_radius,CF_radius*R_cf_top_h,CF_len-X_cf_small_fir
WPCSYS, -1


ALLSEL
VOVLAP,ALL !重なり部分を削除

! CFRPの傘の部分
! 上の部分1
WPOFFS, X_kasa_fir, Y4, Z1/2
WPROTA, sita1*57.3, 0, 90
CYLIND, CF_kasa_radius,0,0,kasa_CF_len*0.2
! 上の部分2
CYLIND, CF_kasa_radius,0,kasa_CF_len*0.2,kasa_CF_len
WPCSYS, -1
! 下の部分1
WPOFFS, X_kasa_fir, Y4, Z1/2
WPROTA, -sita2*57.3, 0, 90
CYLIND, CF_kasa_radius,0,0,kasa_CF_len*0.3
! 下の部分2
CYLIND, CF_kasa_radius,0,kasa_CF_len*0.3,kasa_CF_len
WPCSYS, -1


ALLSEL
VSBV,2,9,,DELETE,KEEP
ALLSEL
VSBV,5,9,,DELETE,KEEP


ALLSEL
VOVLAP,ALL !重なり部分を削除
ALLSEL
VGLUE,ALL


VSEL,S,VOLU,,1,1
CM,CFRP1_1,VOLU
VSEL,S,VOLU,,17,17
CM,CFRP1_2,VOLU
VSEL,S,VOLU,,10,10
CM,CFRP1_3,VOLU
VSEL,S,VOLU,,6,6
CM,CFRP1_s,VOLU
VSEL,S,VOLU,,7,7
CM,CFRP2,VOLU
VSEL,S,VOLU,,8,8
CM,CFRP2_s,VOLU

VSEL,S,VOLU,,9,9
CM,CFRP_kasa_ue_1,VOLU
VSEL,S,VOLU,,4,4
CM,CFRP_kasa_ue_2,VOLU
VSEL,S,VOLU,,13,13
CM,CFRP_kasa_sita_1,VOLU
VSEL,S,VOLU,,14,14
CM,CFRP_kasa_sita_2,VOLU

VSEL,S,VOLU,,18,18
CM,UCHI,VOLU


!-メッシュ分割--------------------------------------------------
!-試験片CFRPメッシュ--------------------------------------------
! 細かく分割する場所
ALLSEL
AESIZE,ALL,0.07E-3

CMSEL,S,CFRP1_2
TYPE,1                             !要素1
MAT,3                             !材料3
MSHAPE,1,3D
MSHKEY,0
VMESH,ALL
MOPT,DEFA
CM,CFRP1_2,ELEM

! 傘部分
CMSEL,S,CFRP_kasa_ue_1
TYPE,1                             !要素1
MAT,3                             !材料3
MSHAPE,1,3D
MSHKEY,0
VMESH,ALL
MOPT,DEFA
CMSEL,U,CFRP1_2
CM,CFRP_kasa_ue_1,ELEM

CMSEL,S,CFRP_kasa_sita_1
TYPE,1                             !要素1
MAT,3                             !材料3
MSHAPE,1,3D
MSHKEY,0
VMESH,ALL
MOPT,DEFA
CMSEL,U,CFRP_kasa_ue_1
CM,CFRP_kasa_sita_1,ELEM


ALLSEL
AESIZE,ALL,DIV3

CMSEL,S,CFRP_kasa_ue_2
TYPE,1                             !要素1
MAT,3                             !材料3
VSWEEP,ALL
MOPT,DEFA
CMSEL,U,CFRP1_2
CMSEL,U,CFRP_kasa_ue_1
CMSEL,U,CFRP_kasa_sita_1
CM,CFRP_kasa_ue_2,ELEM

CMSEL,S,CFRP_kasa_sita_2
TYPE,1                             !要素1
MAT,3                             !材料3
VSWEEP,ALL
MOPT,DEFA
CMSEL,U,CFRP_kasa_ue_2
CM,CFRP_kasa_sita_2,ELEM


ALLSEL
AESIZE,ALL,DIV2

CMSEL,S,CFRP1_1
TYPE,1                             !要素1
MAT,3                             !材料3
VSWEEP,ALL
MOPT,DEFA

CMSEL,S,CFRP1_3
TYPE,1                             !要素1
MAT,3                             !材料3
VSWEEP,ALL
MOPT,DEFA


ALLSEL
AESIZE,ALL,DIV3

CMSEL,S,CFRP1_s
TYPE,1                             !要素1
MAT,3                             !材料3
VSWEEP,ALL
MOPT,DEFA
! CM,CFRP1,ELEM

CMSEL,S,CFRP2
TYPE,1                             !要素1
MAT,3                             !材料3
VSWEEP,ALL
MOPT,DEFA

CMSEL,S,CFRP2_s
TYPE,1                             !要素1
MAT,3                             !材料3
VSWEEP,ALL
MOPT,DEFA


!-試験片内側メッシュ--------------------------------------------
ALLSEL
AESIZE,ALL,DIV2

CMSEL,S,UCHI
TYPE,1                             !要素1
MAT,2                             !材料2
MSHAPE,1,3D
MSHKEY,0
VMESH,ALL
! VSWEEP,ALL
MOPT,DEFA
! CM,UCHI,ELEM


!-試験片外側メッシュ--------------------------------------------
ALLSEL
AESIZE,ALL,DIV1

CMSEL,S,SOTO
TYPE,1                             !要素1
MAT,1                             !材料1
MSHAPE,1,3D
MSHKEY,0
VMESH,ALL
! VSWEEP,ALL
MOPT,DEFA
! CM,SOTO,VOLU
ALLSEL


!-CF部の繊維方向定義--------------------------------------------------

CMSEL,S,CFRP_kasa_ue_2
*GET, MINELEM, ELEM, 0, NUM, MIN
*GET, MAXELEM, ELEM, 0, NUM, MAX

*DO, I, MINELEM, MAXELEM, 1   !ループ

LOCAL, 100+I,CART,0,0,0,sita1*57.3,0,0
EMODIF, I, ESYS, 100+I,

ALLSEL
CSYS,0

*ENDDO


CMSEL,S,CFRP_kasa_sita_2
*GET, MINELEM, ELEM, 0, NUM, MIN
*GET, MAXELEM, ELEM, 0, NUM, MAX

*DO, I, MINELEM, MAXELEM, 1   !ループ

LOCAL, 100+I,CART,0,0,0,-sita2*57.3,0,0
EMODIF, I, ESYS, 100+I,

ALLSEL
CSYS,0
*ENDDO


!-境界条件指定--------------------------------------------------
ALLSEL

ASEL,S,LOC,X,0 !グリップ固定
NSLA,S,1
D,ALL,UZ,0
D,ALL,UX,0
D,ALL,UY,0

! ASEL,S,LOC,Y,0 !グリップ固定
! NSLA,S,1
! D,ALL,UY,0

ASEL,S,LOC,X,X1 !荷重負荷面カップリング
NSLA,S,1
! D,ALL,UZ,0
! D,ALL,UY,0
CP,NEXT,UX,ALL

*GET,NNUM,NODE,,NUM,MIN !最小の節点選択
D,NNUM,UX,DISTANCE !節点引張距離


ALLSEL !節点全選択

!-解析------------------------------------------------------
FINISH
/POST1


FINISH
/SOLU


NSUBST,100,1000,100 ! データベースとファイルの書き込み制御の結果アイテム
TIME,TIME1

OUTRES,ERASE

!OUTRES,ALL,ALL
OUTRES,NSOL,1    !節点の自由度の解
OUTRES,ESOL,1    !次の要素ソリューションアイテムをすべて有効または無効にする
OUTRES,RSOL,1    !節点反応荷重
OUTRES,NLOAD,1    !要素の節点、入力拘束、および力の荷重（POST1コマンドのPRRFOR、NFORCE、FSUMでも使用され、反力の荷重を計算します）。
OUTRES,MISC,1    !エレメントのその他のデータ（ETABLEコマンドのSMISCおよびNMISCアイテム）


SAVE
